# OpenSim document version 40000
CMC_TaskSet CMC_leg_Tracking_Tasks:
  CMC_Joint crank_angle: weight=500 active=(true false false) kp=100 kv=20 coordinate=crank_angle
  CMC_Joint hip_angle_r: weight=250 active=(true false false) kp=100 kv=20 coordinate=hip_angle_r
  CMC_Joint knee_angle_r: weight=250 active=(true false false) kp=100 kv=20 coordinate=knee_angle_r
  CMC_Joint mtp_angle_r: weight=100 active=(true false false) kp=100 kv=20 coordinate=mtp_angle_r
